**
** PARTS
**
*Part, Name=Soil
** Mesh converted from numgeo mesh_Soil.inp
** Only the element type is changed: u8-solid-ax -> CAX8
*Node
1, 1, 0
2, 0, 0
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*Element, Type=CAX8
251, 1, 59, 250, 7, 2656, 2853, 2852, 2602
252, 59, 58, 251, 250, 2655, 2855, 2854, 2853
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*Nset, Nset=bottom
1, 2, 5, 7, 8, 9
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*Nset, Nset=left
2, 4, 64, 65, 66, 67
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*Nset, Nset=right
5, 6, 157, 158, 159, 160
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*Nset, Nset=top
3, 4, 6, 60, 61, 62
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*Nset, Nset=all
1, 2, 3, 4, 5, 6
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*Elset, Elset=all
501, 502, 503, 504, 505, 506
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*Nset, Nset=top-load
4, 2657, 60, 2658, 61, 2659, 62, 2660, 63, 2661, 3
*Nset, Nset=top-left
4
*Elset, Elset=top-load-elements
300, 350, 400, 450, 500
*Solid Section, Elset=all, Material=Hardening-Soil-MN-Bricks
*End Part
**
** ASSEMBLY
**
** Assembly-level sets are deliberate aliases of the instance sets. This keeps
** the external references as Soil.all, Soil.left, Soil.right, etc.
*Assembly, name=Soil
*Instance, Name=Soil-1, Part=Soil
*End Instance
*Nset, Nset=bottom
Soil-1.bottom
*Nset, Nset=left
Soil-1.left
*Nset, Nset=right
Soil-1.right
*Nset, Nset=top
Soil-1.top
*Nset, Nset=all
Soil-1.all
*Nset, Nset=top-load
Soil-1.top-load
*Nset, Nset=top-left
Soil-1.top-left
*Elset, Elset=all
Soil-1.all
*Elset, Elset=top-load-elements
Soil-1.top-load-elements
*Surface, Type=ELEMENT, Name=surf_soil_top
Soil-1.top-load-elements, S2
*End Assembly
**
** MATERIAL
**
** The material name must match CMNAME checked explicitly by the supplied UMAT.
*Material, Name=Hardening-Soil-MN-Bricks
*Depvar
73
*User Material, constants=16, unsymm
30d3, 30d3, 90d3, 0.55, 0, 42, 16, 0.25
** pref, K0nc, Rf, Eiref, alpha, Hpp, gamma_07, G0
100, 0.4, 0.9, 65.5d3, 1.47, 41194, 2e-4, 108e3
*Density
1.7
**
** INITIAL CONDITIONS
**
*Initial conditions, Type=stress, geostatic
Soil.all, 0, 10, -170, 0, 0.4408, 0.4408
***Initial conditions, Type=solution, user
**
** AMPLITUDES
**
*Amplitude, Name=LoadingRamp
0.0, 0.0, 1.0, 1.0
**
** LOAD STEP 1
**
*Step, Name=step1, inc=1, unsymm=yes
*Geostatic
*DLoad
Soil.all, GRAV, 10.0, 0.0, -1.0
*Boundary
Soil.left, 1, 1, 0.0
Soil.right, 1, 1, 0.0
Soil.bottom, 1, 2, 0.0
*Output, field, frequency=1
*Node Output, Nset=Soil.all
U
*Element Output, Elset=Soil.all
S, E
*Controls, parameters=field, field=displacement
0.05, 0.1, , , , , ,
,0.001
*End Step
**
** LOAD STEP 2
**
*Step, Name=step2, inc=10000, unsymm=yes
*Static
0.001, 1.0, 0.0001, 0.005
*Boundary
Soil.left, 1, 1, 0.0
Soil.right, 1, 1, 0.0
Soil.bottom, 1, 2, 0.0
*DSload, amplitude=LoadingRamp
Soil.surf_soil_top, P, 1000.0
*Output, field, frequency=1
*Node Output, Nset=Soil.all
U
*Element Output, Elset=Soil.all
S, E
*Output, history, frequency=1
*Node Output, Nset=Soil.top-left
U
*End Step
